// COMSOL Multiphysics 6.4.0.293 model "case2_comsol.mph"
// Outline of the model tree

Selections
  sel1: Explicit on no domains

Geometry
  geom1 "Geometry 1" (3D, length unit m)
    hel1: Helix | turns = 1.5; rmaj = 50[mm]; rmin = 5[mm]; axialpitch = 20[mm]; pos = {0, 0, -15[mm]}
    ext1: Extrude | extrudefrom = faces; inputface = hel1(1) boundaries 1; distance = 10[cm]
    ext2: Extrude | extrudefrom = faces; inputface = ext1(1) boundaries 11; distance = 10[cm]
    uni1: Union (disabled) | input = ext2; intbnd = off; face = all
    blk1: Block | size = {20[cm], 20[cm], 20[cm]}; base = center
    fin: Finalize "Form Union"
    cmd1: CompositeDomains "Form Composite Domains 1" | input = fin(1) domains 2-4

Materials
  mat1: Common "Air" on domains 1
    def: def "Basic"
      thermalexpansioncoefficient = alpha_p(pA,T)
      molarmass = 0.02897[kg/mol]
      bulkviscosity = muB(T)
      relpermeability = 1/mu0_const
      relpermittivity = 1
      dynamicviscosity = eta(T)
      ratioofspecificheat = 1.4
      electricconductivity = 1e-7[S/m]
      heatcapacity = Cp(T)
      density = rho(pA,T)
      thermalconductivity = k(T)
      soundspeed = cs(T)
      eta: Piecewise | arg = T; pieces = {200.0, 1600.0, -8.38278E-7+8.35717342E-8*T^1-7.69429583E-11*T^2+4.6437266E-14*T^3-1.06585607E-17*T^4}; argunit = K; fununit = Pa*s
      Cp: Piecewise | arg = T; pieces = {200.0, 1600.0, 1047.63657-0.372589265*T^1+9.45304214E-4*T^2-6.02409443E-7*T^3+1.2858961E-10*T^4}; argunit = K; fununit = J/(kg*K)
      rho: Analytic | expr = pA*0.02897/R_const[K*mol/J]/T; args = {pA, T}; fununit = kg/m^3; argunit = {Pa, K}
      k: Piecewise | arg = T; pieces = {200.0, 1600.0, -0.00227583562+1.15480022E-4*T^1-7.90252856E-8*T^2+4.11702505E-11*T^3-7.43864331E-15*T^4}; argunit = K; fununit = W/(m*K)
      cs: Analytic | expr = sqrt(1.4*R_const[K*mol/J]/0.02897*T); args = T; fununit = m/s; argunit = K
      an1: Analytic | funcname = alpha_p; expr = -1/rho(pA,T)*d(rho(pA,T),T); args = {pA, T}; fununit = 1/K; argunit = {Pa, K}
      an2: Analytic "Analytic 2a" | funcname = muB; expr = 0.6*eta(T); args = T; fununit = Pa*s; argunit = K
    RefractiveIndex: RefractiveIndex
      n = 1
      ki = 0
    NonlinearModel: NonlinearModel (disabled)
      BA = (def.gamma+1)/2
    idealGas: idealGas
      Rs = R_const/Mn
      heatcapacity = Cp(T)
      ratioofspecificheat = 1.4
      molarmass = 0.02897
      Cp: Piecewise | arg = T; pieces = {200.0, 1600.0, 1047.63657-0.372589265*T^1+9.45304214E-4*T^2-6.02409443E-7*T^3+1.2858961E-10*T^4}; argunit = K; fununit = J/(kg*K)
  mat2: Common "Copper" on domains 2
    def: def "Basic"
      relpermeability = 1/mu0_const
      electricconductivity = 62.83185[S/m]
      thermalexpansioncoefficient = 17e-6[1/K]
      heatcapacity = 385[J/(kg*K)]
      relpermittivity = 1
      density = 8960[kg/m^3]
      thermalconductivity = 400[W/(m*K)]
    Enu: Enu "Young's modulus and Poisson's ratio"
      E = 110e9[Pa]
      nu = 0.35
    linzRes: linzRes "Linearized resistivity" (disabled)
      rho0 = 1.72e-8[ohm*m]
      alpha = 0.0039[1/K]
      Tref = 298[K]

Physics
  mf: InductionCurrents "Magnetic Fields" (disabled) on all domains
    dependent variable A = {Ax, Ay, Az}
    al1: AmperesLawFluid "Ampère's Law 1" (default)
    mi1: MagneticInsulation (default)
    init1: init "Initial Values 1" (default)
    coil1: Coil (disabled) on domains 2
      ccc1: CoilCurrentCalculation "Geometry Analysis 1" (default)
        ct1: CoilTerminal "Input 1" on boundaries 11
        cg1: CoilGround "Output 1" on boundaries 8
  mef: ElectricInductionCurrents "Magnetic and Electric Fields" (disabled) on all domains
    dependent variable A2 = {A2x, A2y, A2z}
    ShapeProperty.order_magneticvectorpotential = 1
    ShapeProperty.order_electricpotential = 1
    EquationForm.form = Stationary
    fsp1: FreeSpace (default) | sigma_stab_mat = userdef; sigma_stab = 1e-7
    mi1: MagneticInsulation (default)
      gnd1: Ground (default)
        constraintOptions = pointwiseConstraints
        constraintType = symmetricConstraint
        constraintMethod = elemental
      term1: Terminal "Boundary Terminal 1" on boundaries 8 | TerminalType = Current; I0 = -2191.9
      ein1: ElectricInsulation (disabled) on boundaries 1-5, 12
    init1: init "Initial Values 1" (default)
    alcs1: ElectromagneticModelSolid "Ampère's Law and Current Conservation in Solids 1" on domains 2
      epsilonr_mat = from_mat
    gfa1: GaugeFixingA "Gauge Fixing for A-Field 1" (disabled) on domains 1
    mp1: MagneticPotential "Tangential Magnetic Vector Potential 1" on boundaries 1-5, 12
    alcf1: ElectromagneticModelFluid "Ampère's Law and Current Conservation in Fluids 1" on domains 1
      sigma_mat = userdef
      sigma = 1e-7
  mf2: InductionCurrents "Magnetic Fields 2" on all domains
    dependent variable A3 = {A3x, A3y, A3z}
    ShapeProperty.order_magneticvectorpotential = 1
    fsp1: FreeSpace (default) | sigma_stab_mat = off
    mi1: MagneticInsulation (default)
    init1: init "Initial Values 1" (default)
    coil1: Coil "Domain Coil 1" on domains 2
      ICoil = 2191.9[A]
      epsilonr_mat = userdef
      epsilonr = 0
      materialType = solid
      ccc1: CoilCurrentCalculation "Geometry Analysis 1" (default)
        ct1: CoilTerminal "Input 1" on boundaries 8 | Reverse = 1
        cg1: CoilGround "Output 1" on boundaries 11
        ci1: CoilInsulation "Electric Insulation 1" on boundaries 1-7, 9, 10, 12
    alf1: AmperesLawFluid "Ampère's Law in Fluids 1" on domains 1
      sigma_mat = from_mat
      epsilonr_mat = userdef
      epsilonr = 0
    mp1: MagneticPotential "Tangential Magnetic Vector Potential 1" (disabled) on boundaries 1-7, 9, 10, 12
    mfb1: MagneticFieldBoundary "Tangential Magnetic Field 1" (disabled) on boundaries 1-5, 8, 11, 12
    mp2: MagneticPotential "Tangential Magnetic Vector Potential 2" on boundaries 1-5, 8, 11, 12

Mesh
  mesh1 "Mesh 1" (physics-controlled)

Studies
  std1 "Study 1"
    ccc: CoilCurrentCalculation "Coil Geometry Analysis" | SpecifyCoils = on; CoilName = 1
    stat: Stationary

Solver configurations
  sol1 "Solution 1" (study std1)
    v1: Variables "Dependent Variables 1"
    s1: Stationary "Stationary Solver 1"
      dDef: Direct
      fc1: FullyCoupled | linsolver = dDef
    su1: StoreSolution "Solution Store 1"
    v2: Variables "Dependent Variables 2" | initmethod = sol; notsolmethod = sol
    s2: Stationary "Stationary Solver 2"
      se1: Segregated | maxsegiter = 200
        ss1: SegregatedStep "Magnetic Fields 2" | segvar = {comp1_A3}; linsolver = i1; subdamp = 0.8
        ss2: SegregatedStep "Coil Ode Variables" | segvar = {comp1_mf2_coil1_VCoil_ode}; linsolver = d1
      i1: Iterative | linsolver = fgmres; nlinnormuse = on; rhob = 10000
        ams1: AMS "Auxiliary-Space Maxwell (AMS) 1" | iter = 1; amsmagnstatic = on
      d1: Direct
  sol2 "Adaptive Mesh Refinement Solutions 1" (study std1)
  sol3 "Solution Store 1" (study std1)

Datasets
  dset1: Solution | solution = sol1
  dset2: Solution | solution = sol2
  dset3: Solution | solution = sol3

Plots
  pg1: PlotGroup3D "Magnetic Flux Density (mef)" (disabled) | data = dset1
    mslc1: Multislice
      expr = mef.normB
      multiplanexmethod = coord
      xcoord = mef.CPx
      multiplaneymethod = coord
      ycoord = mef.CPy
      multiplanezmethod = coord
      zcoord = mef.CPz
    strmsl1: StreamlineMultislice
      expr = {mef.Bx, mef.By, mef.Bz}
      multiplanexmethod = coord
      xcoord = mef.CPx
      multiplaneymethod = coord
      ycoord = mef.CPy
      multiplanezmethod = coord
      zcoord = mef.CPz
      tran1: Transparency | transparency = 0.9; expr = V
      filt1: Filter | expr = !isScalingSystemDomain
  pg2: PlotGroup3D "Electric Field (mef)" (disabled) | data = dset1
    mslc1: Multislice
      expr = mef.normE
      multiplanexmethod = coord
      xcoord = mef.CPx
      multiplaneymethod = coord
      ycoord = mef.CPy
      multiplanezmethod = coord
      zcoord = mef.CPz
    strmsl1: StreamlineMultislice
      expr = {mef.Ex, mef.Ey, mef.Ez}
      multiplanexmethod = coord
      xcoord = mef.CPx
      multiplaneymethod = coord
      ycoord = mef.CPy
      multiplanezmethod = coord
      zcoord = mef.CPz
      tran1: Transparency | transparency = 0.9; expr = V
      filt1: Filter | expr = !isScalingSystemDomain
  pg3: PlotGroup3D "Magnetic Field" (disabled) on domains 2 | data = dset1
    vol1: Volume | expr = mef.normB
  pg4: PlotGroup3D "Current Density" on domains 2 | data = dset1
    vol1: Volume "Volume 1mef.normJ" | expr = mf2.normJ

Exports
  data1: Data
    data = dset1
    expr = {material.domain, mf2.Ax, mf2.Ay, mf2.Az, mf2.Bx, mf2.By, mf2.Bz, , , }
    unit = {, Wb/m, Wb/m, Wb/m, T, T, T, , , }
    descr = {Material settings, "Magnetic vector potential, x-component", "Magnetic vector potential, y-component", "Magnetic vector potential, z-component", "Magnetic flux density, x-component", "Magnetic flux density, y-component", "Magnetic flux density, z-component", , , }
    exporttype = vtu
    filename = /home/wiera/Documents/EM_simulation/output/case2/case2_comsol_export.vtu
    lagorder = 3
  data2: Data
    data = dset1
    expr = {mf2.Ax, mf2.Ay, mf2.Az, mf2.Bx, mf2.By, mf2.Bz, mf2.VCoil_1, mf2.normJ}
    unit = {Wb/m, Wb/m, Wb/m, T, T, T, V, A/m^2}
    descr = {"Magnetic vector potential, x-component", "Magnetic vector potential, y-component", "Magnetic vector potential, z-component", "Magnetic flux density, x-component", "Magnetic flux density, y-component", "Magnetic flux density, z-component", Electric potential, Current density norm}
    filename = /home/wiera/Documents/EM_simulation/output/case2/gauss/case2_comsol.txt
    pattern = gauss